// COMSOL Multiphysics 6.2.0.415 model "Cantilever.mph"
// Outline of the model tree

Geometry
  geom1 "Geometry 1" (2D, length unit m)
    ls1: LineSegment | specify1 = coord; specify2 = coord; coord2 = {0.5, 0}
    fin: Finalize "Form Union"

Materials
  mat1: Common "Structural steel" on all boundaries
    def "Basic"
      lossfactor = 0.02
      relpermeability = 1
      heatcapacity = 475[J/(kg*K)]
      thermalconductivity = 44.5[W/(m*K)]
      electricconductivity = 4.032e6[S/m]
      relpermittivity = 1
      thermalexpansioncoefficient = 12.3e-6[1/K]
      density = 7850[kg/m^3]
    Enu "Young's modulus and Poisson's ratio"
      E = E(T)
      nu = nu(T)
      int1: Interpolation | funcname = E; table = {{293.15, 200e9}, {793.15, 166.6e9}}; extrap = linear; fununit = Pa; argunit = K
      int2: Interpolation | funcname = nu; table = {{293.15, 0.30}, {793.15, 0.315}}; extrap = linear; fununit = 1; argunit = K
    Murnaghan
      l = -3.0e11[Pa]
      m = -6.2e11[Pa]
      n = -7.2e11[Pa]
    ElastoplasticModel "Elastoplastic material model"
      sigmags = 350[MPa]*a(T)
      Et = 1.045[GPa]*a(T)
      Ek = 1.045[GPa]*a(T)
      sigmagh = 1.050[GPa]*epe*a(T)
      Hillcoefficients = {0[m^2*s^4/kg^2], 0[m^2*s^4/kg^2], 0[m^2*s^4/kg^2], 0[m^2*s^4/kg^2], 0[m^2*s^4/kg^2], 0[m^2*s^4/kg^2]}
      ys = {0[N/m^2], 0[N/m^2], 0[N/m^2], 0[N/m^2], 0[N/m^2], 0[N/m^2]}
      int1: Interpolation | funcname = a; table = {{600, 1}, {1100, 0.1}, {1643, 0}}; fununit = 1; argunit = K
    Ludwik
      k_lud = 560[MPa]*a(T)
      n_lud = 0.61
      int1: Interpolation | funcname = a; table = {{600, 1}, {1100, 0.1}, {1643, 0}}; fununit = 1; argunit = K
    JohnsonCook
      k_jcook = 560[MPa]
      n_jcook = 0.61
      C_jcook = 0.12
      epet0_jcook = 1[1/s]
      m_jcook = 0.6
    Swift
      e0_swi = 0.021
      n_swi = 0.2
    Voce
      sigma_voc = 249[MPa]*a(T)
      beta_voc = 9.3
      int1: Interpolation | funcname = a; table = {{600, 1}, {1100, 0.1}, {1643, 0}}; fununit = 1; argunit = K
    HockettSherby
      sigma_hoc = 684[MPa]*a(T)
      m_hoc = 3.9
      n_hoc = 0.85
      int1: Interpolation | funcname = a; table = {{600, 1}, {1100, 0.1}, {1643, 0}}; fununit = 1; argunit = K
    ArmstrongFrederick
      Ck = 2.070[GPa]*a(T)
      gammak = 8.0
      int1: Interpolation | funcname = a; table = {{600, 1}, {1100, 0.1}, {1643, 0}}; fununit = 1; argunit = K
    Norton
      A_nor = 1.2e-15[1/s]
      sigRef_nor = 1[MPa]
      n_nor = 4.5
    Garofalo "Garofalo (hyperbolic sine)"
      A_gar = 1e-6[1/s]
      sigRef_gar = 100[MPa]
      n_gar = 4.6
    ChabocheViscoplasticity
      A_cha = 1[1/s]
      sigRef_cha = 490[MPa]
      n_cha = 9

Physics
  beam: HermitianBeam on all boundaries
    dependent variable u = {u, v, w}
    emm1: Elastic "Linear Elastic Material 1" (default)
    csd1: CrossSectionBeam "Cross-Section Data 1" (default)
      SectionType = RectangularSection
      hy_rect = 0.006
      hz_rect = 0.006
    free1: Free (default)
    init1: init "Initial Values 1" (default)
    fix1: Fixed "Fixed Constraint 1" on points 1
    pl1: PointLoad on points 2 | Fp = {0, -10, 0}

Mesh
  mesh1 "Mesh 1" (physics-controlled)

Studies
  std1 "Study 1"
    stat: Stationary

Solver configurations
  sol1 "Solution 1" (study std1)
    v1: Variables "Dependent Variables 1"
    s1: Stationary "Stationary Solver 1"
      dDef: Direct
      fc1: FullyCoupled | linsolver = dDef

Datasets
  dset1: Solution | solution = sol1
  cln1: CutLine2D | data = dset1

Plots
  pg1: PlotGroup2D "Stress (beam)" | data = dset1
    line1: Line | expr = beam.mises; linetype = tube; radiusexpr = beam.re
      def: Deform "Deformation" | expr = {u, v}; descr = Displacement field
  pg2: PlotGroup1D "1D Plot Group 2" | data = dset1
    lngr1: LineGraph on all boundaries | data = dset1; expr = beam.esymax; unit = 1; descr = Beam Displacement

Exports
  plot1: Plot | filename = /Users/anujsreenivasan/Desktop/ACADS/SEM 6/Garbage/Project/Cantilever/disp.txt